// SBML level 3 version 1

model bcm()
  // model units - substance: substance, time: time, volume: volume, area: area, length: length, extent: substance

  // Compartments:
  compartment kinetics_472_0_ = 1.666667e-15 volume;

  // Species:
  species $Ca_479_0_ in kinetics_472_0_ = 8e-5;
  species CaN_481_0_ in kinetics_472_0_ = 0.0002;
  species CaM_483_0_ in kinetics_472_0_ = 0.01;
  species Ca4_dot_CaM_485_0_ in kinetics_472_0_ = 0; Ca4_dot_CaM_485_0_ is "Ca4.CaM";
  species Ca2_CaN_489_0_ in kinetics_472_0_ = 0;
  species deph_AMPAR_cplx_492_0_ in kinetics_472_0_ = 0;
  species CaMKII_496_0_ in kinetics_472_0_ = 0.01;
  species act_CaMKII_500_0_ in kinetics_472_0_ = 0;
  species ph_AMPAR_cplx_503_0_ in kinetics_472_0_ = 0;
  species AMPAR_505_0_ in kinetics_472_0_ = 0.0016;
  species p_AMPAR_507_0_ in kinetics_472_0_ = 0.0004;

  // Reactions:
  // kinetics_472_0_ * Ca_bind_CaN_487_0__Kf * CaN_481_0_*Ca_479_0_^2-kinetics_472_0_ * Ca_bind_CaN_487_0__Kb * Ca2_CaN_489_0_
  Ca_bind_CaN_487_0_: CaN_481_0_ + 2 $Ca_479_0_ -> Ca2_CaN_489_0_; kinetics_472_0_*Ca_bind_CaN_487_0__Kf*CaN_481_0_*Ca_479_0_^2 - kinetics_472_0_*Ca_bind_CaN_487_0__Kb*Ca2_CaN_489_0_;
    Ca_bind_CaN_487_0__Kf = 1000000 sq_litre_per_mmole_sq_per_second; Ca_bind_CaN_487_0__Kb = 0.2 per_second;
  // kinetics_472_0_ * Ca_bind_CaM_494_0__Kf * CaM_483_0_*Ca_479_0_^4-kinetics_472_0_ * Ca_bind_CaM_494_0__Kb * Ca4_dot_CaM_485_0_
  Ca_bind_CaM_494_0_: CaM_483_0_ + 4 $Ca_479_0_ -> Ca4_dot_CaM_485_0_; kinetics_472_0_*Ca_bind_CaM_494_0__Kf*CaM_483_0_*Ca_479_0_^4 - kinetics_472_0_*Ca_bind_CaM_494_0__Kb*Ca4_dot_CaM_485_0_;
    Ca_bind_CaM_494_0__Kf = 100000000000 litre_per_mmole_4_per_second; Ca_bind_CaM_494_0__Kb = 4 per_second;
  // kinetics_472_0_ * CaM_act_CaMKII_498_0__Kf * CaMKII_496_0_*Ca4_dot_CaM_485_0_-kinetics_472_0_ * CaM_act_CaMKII_498_0__Kb * act_CaMKII_500_0_
  CaM_act_CaMKII_498_0_: CaMKII_496_0_ + Ca4_dot_CaM_485_0_ -> act_CaMKII_500_0_; kinetics_472_0_*CaM_act_CaMKII_498_0__Kf*CaMKII_496_0_*Ca4_dot_CaM_485_0_ - kinetics_472_0_*CaM_act_CaMKII_498_0__Kb*act_CaMKII_500_0_;
    CaM_act_CaMKII_498_0__Kf = 100 litre_per_mmole_per_second; CaM_act_CaMKII_498_0__Kb = 0.1 per_second;
  // kinetics_472_0_ * baseline_509_0__Kf * AMPAR_505_0_-kinetics_472_0_ * baseline_509_0__Kb * p_AMPAR_507_0_
  baseline_509_0_: AMPAR_505_0_ -> p_AMPAR_507_0_; kinetics_472_0_*baseline_509_0__Kf*AMPAR_505_0_ - kinetics_472_0_*baseline_509_0__Kb*p_AMPAR_507_0_;
    baseline_509_0__Kf = 0.4 per_second; baseline_509_0__Kb = 1.6 per_second;
  // kinetics_472_0_ * ( k1 * Ca2_CaN_489_0_*p_AMPAR_507_0_ - k2 * deph_AMPAR_cplx_492_0_ )
  deph_AMPAR_491_0_Complex_formation_: Ca2_CaN_489_0_ + p_AMPAR_507_0_ -> deph_AMPAR_cplx_492_0_; kinetics_472_0_*(deph_AMPAR_491_0_Complex_formation__k1*Ca2_CaN_489_0_*p_AMPAR_507_0_ - deph_AMPAR_491_0_Complex_formation__k2*deph_AMPAR_cplx_492_0_);
    deph_AMPAR_491_0_Complex_formation__k1 = 498161.7 litre_per_mmole_per_second; deph_AMPAR_491_0_Complex_formation__k2 = 40 per_second;
  // kinetics_472_0_ * k3*deph_AMPAR_cplx_492_0_
  deph_AMPAR_491_0_Product_formation_: deph_AMPAR_cplx_492_0_ => AMPAR_505_0_ + Ca2_CaN_489_0_; kinetics_472_0_*deph_AMPAR_491_0_Product_formation__k3*deph_AMPAR_cplx_492_0_;
    deph_AMPAR_491_0_Product_formation__k3 = 10 per_second;
  // kinetics_472_0_ * ( k1 * AMPAR_505_0_*act_CaMKII_500_0_ - k2 * ph_AMPAR_cplx_503_0_ )
  ph_AMPAR_502_0_Complex_formation_: AMPAR_505_0_ + act_CaMKII_500_0_ -> ph_AMPAR_cplx_503_0_; kinetics_472_0_*(ph_AMPAR_502_0_Complex_formation__k1*AMPAR_505_0_*act_CaMKII_500_0_ - ph_AMPAR_502_0_Complex_formation__k2*ph_AMPAR_cplx_503_0_);
    ph_AMPAR_502_0_Complex_formation__k1 = 9963.233 litre_per_mmole_per_second; ph_AMPAR_502_0_Complex_formation__k2 = 8 per_second;
  // kinetics_472_0_ * k3*ph_AMPAR_cplx_503_0_
  ph_AMPAR_502_0_Product_formation_: ph_AMPAR_cplx_503_0_ => p_AMPAR_507_0_ + act_CaMKII_500_0_; kinetics_472_0_*ph_AMPAR_502_0_Product_formation__k3*ph_AMPAR_cplx_503_0_;
    ph_AMPAR_502_0_Product_formation__k3 = 2 per_second;

  // Unit definitions:
  unit volume = litre;
  unit substance = 1e-3 mole;
  unit length = metre;
  unit area = metre^2;
  unit time = second;
  unit sq_litre_per_mmole_sq_per_second = litre^2 / ((1e-3 mole)^2 * second);
  unit per_second = 1 / second;
  unit litre_per_mmole_4_per_second = litre^4 / ((1e-3 mole)^4 * second);
  unit litre_per_mmole_per_second = litre / (1e-3 mole * second);
end
