// SBML level 3 version 1

model conv()
  // model units - substance: substance, time: time, volume: volume, area: area, length: length, extent: substance

  // Compartments:
  compartment kinetics_2702_0_ = 1.666667e-18 volume;

  // Species:
  species $input_2709_0_ in kinetics_2702_0_ = 0.001;
  species output_2711_0_ in kinetics_2702_0_ = 0;

  // Reactions:
  // kinetics_2702_0_ * kreac_2713_0__Kf * input_2709_0_-kinetics_2702_0_ * kreac_2713_0__Kb * output_2711_0_
  kreac_2713_0_: $input_2709_0_ -> output_2711_0_; kinetics_2702_0_*kreac_2713_0__Kf*input_2709_0_ - kinetics_2702_0_*kreac_2713_0__Kb*output_2711_0_;
    kreac_2713_0__Kf = 1 per_second; kreac_2713_0__Kb = 1 per_second;

  // Unit definitions:
  unit volume = litre;
  unit substance = 1e-3 mole;
  unit length = metre;
  unit area = metre^2;
  unit time = second;
  unit per_second = 1 / second;
end
