// SBML level 3 version 1

model conv2ndOrder()
  // model units - substance: substance, time: time, volume: volume, area: area, length: length, extent: substance

  // Compartments:
  compartment kinetics_2774_0_ = 1.666667e-18 volume;

  // Species:
  species $input_2781_0_ in kinetics_2774_0_ = 0.001;
  species output_2783_0_ in kinetics_2774_0_ = 0;

  // Reactions:
  // kinetics_2774_0_ * kreac_2785_0__Kf * input_2781_0_^2-kinetics_2774_0_ * kreac_2785_0__Kb * output_2783_0_
  kreac_2785_0_: 2 $input_2781_0_ -> output_2783_0_; kinetics_2774_0_*kreac_2785_0__Kf*input_2781_0_^2 - kinetics_2774_0_*kreac_2785_0__Kb*output_2783_0_;
    kreac_2785_0__Kf = 1000 litre_per_mmole_per_second; kreac_2785_0__Kb = 1 per_second;

  // Unit definitions:
  unit volume = litre;
  unit substance = 1e-3 mole;
  unit length = metre;
  unit area = metre^2;
  unit time = second;
  unit litre_per_mmole_per_second = litre / (1e-3 mole * second);
  unit per_second = 1 / second;
end
