// SBML level 3 version 1

model conv2ndOrder_slow()
  // model units - substance: substance, time: time, volume: volume, area: area, length: length, extent: substance

  // Compartments:
  compartment kinetics_1906_0_ = 1.666667e-18 volume;

  // Species:
  species $input_1913_0_ in kinetics_1906_0_ = 0.001;
  species output_1915_0_ in kinetics_1906_0_ = 0;

  // Reactions:
  // kinetics_1906_0_ * kreac_1917_0__Kf * input_1913_0_^2-kinetics_1906_0_ * kreac_1917_0__Kb * output_1915_0_
  kreac_1917_0_: 2 $input_1913_0_ -> output_1915_0_; kinetics_1906_0_*kreac_1917_0__Kf*input_1913_0_^2 - kinetics_1906_0_*kreac_1917_0__Kb*output_1915_0_;
    kreac_1917_0__Kf = 500 litre_per_mmole_per_second; kreac_1917_0__Kb = 0.5 per_second;

  // Unit definitions:
  unit volume = litre;
  unit substance = 1e-3 mole;
  unit length = metre;
  unit area = metre^2;
  unit time = second;
  unit litre_per_mmole_per_second = litre / (1e-3 mole * second);
  unit per_second = 1 / second;
end
