// SBML level 3 version 1

model conv_slow()
  // model units - substance: substance, time: time, volume: volume, area: area, length: length, extent: substance

  // Compartments:
  compartment kinetics_524_0_ = 1.666667e-18 volume;

  // Species:
  species $input_531_0_ in kinetics_524_0_ = 0.001;
  species output_533_0_ in kinetics_524_0_ = 0;

  // Reactions:
  // kinetics_524_0_ * kreac_535_0__Kf * input_531_0_-kinetics_524_0_ * kreac_535_0__Kb * output_533_0_
  kreac_535_0_: $input_531_0_ -> output_533_0_; kinetics_524_0_*kreac_535_0__Kf*input_531_0_ - kinetics_524_0_*kreac_535_0__Kb*output_533_0_;
    kreac_535_0__Kf = 0.5 per_second; kreac_535_0__Kb = 0.5 per_second;

  // Unit definitions:
  unit volume = litre;
  unit substance = 1e-3 mole;
  unit length = metre;
  unit area = metre^2;
  unit time = second;
  unit per_second = 1 / second;
end
