// SBML level 3 version 1

model exc()
  // model units - substance: substance, time: time, volume: volume, area: area, length: length, extent: substance

  // Compartments:
  compartment kinetics_545_0_ = 1.666667e-18 volume;

  // Species:
  species $input_552_0_ in kinetics_545_0_ = 0.001;
  species output_554_0_ in kinetics_545_0_ = 0;
  species mol_558_0_ in kinetics_545_0_ = 0.001;

  // Reactions:
  // kinetics_545_0_ * kreac_556_0__Kf * input_552_0_*mol_558_0_-kinetics_545_0_ * kreac_556_0__Kb * output_554_0_
  kreac_556_0_: $input_552_0_ + mol_558_0_ -> output_554_0_; kinetics_545_0_*kreac_556_0__Kf*input_552_0_*mol_558_0_ - kinetics_545_0_*kreac_556_0__Kb*output_554_0_;
    kreac_556_0__Kf = 500 litre_per_mmole_per_second; kreac_556_0__Kb = 0.5 per_second;

  // Unit definitions:
  unit volume = litre;
  unit substance = 1e-3 mole;
  unit length = metre;
  unit area = metre^2;
  unit time = second;
  unit litre_per_mmole_per_second = litre / (1e-3 mole * second);
  unit per_second = 1 / second;
end
