// SBML level 3 version 1

model exc2ndOrder()
  // model units - substance: substance, time: time, volume: volume, area: area, length: length, extent: substance

  // Compartments:
  compartment kinetics_449_0_ = 1.666667e-18 volume;

  // Species:
  species $input_456_0_ in kinetics_449_0_ = 0.0005;
  species output_458_0_ in kinetics_449_0_ = 0;
  species mol_462_0_ in kinetics_449_0_ = 0.001;

  // Reactions:
  // kinetics_449_0_ * kreac_460_0__Kf * input_456_0_^2*mol_462_0_-kinetics_449_0_ * kreac_460_0__Kb * output_458_0_
  kreac_460_0_: 2 $input_456_0_ + mol_462_0_ -> output_458_0_; kinetics_449_0_*kreac_460_0__Kf*input_456_0_^2*mol_462_0_ - kinetics_449_0_*kreac_460_0__Kb*output_458_0_;
    kreac_460_0__Kf = 500000 sq_litre_per_mmole_sq_per_second; kreac_460_0__Kb = 0.5 per_second;

  // Unit definitions:
  unit volume = litre;
  unit substance = 1e-3 mole;
  unit length = metre;
  unit area = metre^2;
  unit time = second;
  unit sq_litre_per_mmole_sq_per_second = litre^2 / ((1e-3 mole)^2 * second);
  unit per_second = 1 / second;
end
