// SBML level 3 version 1

model fb_inhib()
  // model units - substance: substance, time: time, volume: volume, area: area, length: length, extent: substance

  // Compartments:
  compartment kinetics_1927_0_ = 1.666667e-18 volume;

  // Species:
  species $input_1934_0_ in kinetics_1927_0_ = 0;
  species output_1936_0_ in kinetics_1927_0_ = 0;
  species $sub_1938_0_ in kinetics_1927_0_ = 0.001;
  species L1_1942_0_ in kinetics_1927_0_ = 0.001;
  species B_1946_0_ in kinetics_1927_0_ = 0;
  species kenz_cplx_1949_0_ in kinetics_1927_0_ = 0;
  species Boff_1953_0_ in kinetics_1927_0_ = 0;
  species fb_1955_0_ in kinetics_1927_0_ = 0;

  // Reactions:
  // kinetics_1927_0_ * kreac_2__1940_0__Kf * output_1936_0_
  kreac_2__1940_0_: output_1936_0_ => $sub_1938_0_; kinetics_1927_0_*kreac_2__1940_0__Kf*output_1936_0_;
    kreac_2__1940_0__Kf = 5 per_second;
  // kinetics_1927_0_ * kreac_1944_0__Kf * L1_1942_0_*input_1934_0_-kinetics_1927_0_ * kreac_1944_0__Kb * B_1946_0_
  kreac_1944_0_: L1_1942_0_ + $input_1934_0_ -> B_1946_0_; kinetics_1927_0_*kreac_1944_0__Kf*L1_1942_0_*input_1934_0_ - kinetics_1927_0_*kreac_1944_0__Kb*B_1946_0_;
    kreac_1944_0__Kf = 500 litre_per_mmole_per_second; kreac_1944_0__Kb = 0.5 per_second;
  // kinetics_1927_0_ * kreac_1__1951_0__Kf * fb_1955_0_*L1_1942_0_-kinetics_1927_0_ * kreac_1__1951_0__Kb * Boff_1953_0_
  kreac_1__1951_0_: fb_1955_0_ + L1_1942_0_ -> Boff_1953_0_; kinetics_1927_0_*kreac_1__1951_0__Kf*fb_1955_0_*L1_1942_0_ - kinetics_1927_0_*kreac_1__1951_0__Kb*Boff_1953_0_;
    kreac_1__1951_0__Kf = 1000 litre_per_mmole_per_second; kreac_1__1951_0__Kb = 0.1 per_second;
  // kinetics_1927_0_ * kreac_3__1957_0__Kf * output_1936_0_-kinetics_1927_0_ * kreac_3__1957_0__Kb * fb_1955_0_
  kreac_3__1957_0_: output_1936_0_ -> fb_1955_0_; kinetics_1927_0_*kreac_3__1957_0__Kf*output_1936_0_ - kinetics_1927_0_*kreac_3__1957_0__Kb*fb_1955_0_;
    kreac_3__1957_0__Kf = 0.2 per_second; kreac_3__1957_0__Kb = 0.02 per_second;
  // kinetics_1927_0_ * ( k1 * B_1946_0_*sub_1938_0_ - k2 * kenz_cplx_1949_0_ )
  kenz_1948_0_Complex_formation_: B_1946_0_ + $sub_1938_0_ -> kenz_cplx_1949_0_; kinetics_1927_0_*(k1*B_1946_0_*sub_1938_0_ - k2*kenz_cplx_1949_0_);
    k1 = 99632.33 litre_per_mmole_per_second; k2 = 40 per_second;
  // kinetics_1927_0_ * k3*kenz_cplx_1949_0_
  kenz_1948_0_Product_formation_: kenz_cplx_1949_0_ => output_1936_0_ + B_1946_0_; kinetics_1927_0_*k3*kenz_cplx_1949_0_;
    k3 = 10 per_second;

  // Unit definitions:
  unit volume = litre;
  unit substance = 1e-3 mole;
  unit length = metre;
  unit area = metre^2;
  unit time = second;
  unit per_second = 1 / second;
  unit litre_per_mmole_per_second = litre / (1e-3 mole * second);
end
