// SBML level 3 version 1

model inh()
  // model units - substance: substance, time: time, volume: volume, area: area, length: length, extent: substance

  // Compartments:
  compartment kinetics_568_0_ = 1.666667e-18 volume;

  // Species:
  species $input_575_0_ in kinetics_568_0_ = 0.001;
  species output_579_0_ in kinetics_568_0_ = 0.001;
  species prd_581_0_ in kinetics_568_0_ = 0;

  // Reactions:
  // kinetics_568_0_ * kreac_577_0__Kf * output_579_0_*input_575_0_-kinetics_568_0_ * kreac_577_0__Kb * prd_581_0_
  kreac_577_0_: output_579_0_ + $input_575_0_ -> prd_581_0_; kinetics_568_0_*kreac_577_0__Kf*output_579_0_*input_575_0_ - kinetics_568_0_*kreac_577_0__Kb*prd_581_0_;
    kreac_577_0__Kf = 500 litre_per_mmole_per_second; kreac_577_0__Kb = 0.5 per_second;

  // Unit definitions:
  unit volume = litre;
  unit substance = 1e-3 mole;
  unit length = metre;
  unit area = metre^2;
  unit time = second;
  unit litre_per_mmole_per_second = litre / (1e-3 mole * second);
  unit per_second = 1 / second;
end
