// SBML level 3 version 1

model kholodenko()
  // The total concn. of MAPK is 300nM from Kholodenko, 2000.
  // model units - substance: substance, time: time, volume: volume, area: area, length: length, extent: substance

  // Compartments:
  compartment kinetics_1962_0_ = 1.666667e-18 volume;

  // Species:
  // The total concn. of MAPK is 300nM from Kholodenko, 2000.
  species MAPK_1971_0_ in kinetics_1962_0_ = 0.000301107075;
  // The total concn. of MKKK is 100nM from Kholodenko, 2000
  species MKKK_1973_0_ in kinetics_1962_0_ = 0.000100369025;
  // The total concn. of MKK is 300nM from Kholodenko,2000
  species MKK_1975_0_ in kinetics_1962_0_ = 0.000301107075;
  // This is the intermediate enzyme which catalyses the dephosphorylation of MKKK-P to MKKK. The concentration is set to 1 nM based on from Kholodenko, 2000
  species int1_1977_0_ in kinetics_1962_0_ = 1.00369025e-6;
  // This is the phosphorylated form of MKKK which converts MKK to MKK-P and then to MKK-PP from Kholodenko, 2000.
  species MKKK_P_1981_0_ in kinetics_1962_0_ = 0;
  // This intermediate enzyme catalyses the dephosphorylation of MKK-P to MKK. The concentration is 1nM from Kholodenko, 2000
  species int3_1987_0_ in kinetics_1962_0_ = 1.00369025e-6;
  // This catalyses the conversion of MAPK-P to MAPK. The concenration is 1nM. from Kholodenko, 2000
  species int5_1991_0_ in kinetics_1962_0_ = 1.00369025e-6;
  // This is the single phoshorylated form of MKK. from Kholodenko, 2000.
  species MKK_P_1995_0_ in kinetics_1962_0_ = 0;
  // This is the single phopshorylated form of MAPK from Kholodenko, 2000.
  species MAPK_P_1997_0_ in kinetics_1962_0_ = 0;
  // This intermediate enzyme which catalyses the dephosphorylation of MKK-PP to MKK-P. The concentration is 1nM. from Kholodenko, 2000
  species int2_1999_0_ in kinetics_1962_0_ = 1.00369025e-6;
  // This intermediate enzyme catalyses the dephosphorylation of MAPK-PP to MAPK-P. The concentration is 1nM. from Kholodenko, 2000
  species int4_2003_0_ in kinetics_1962_0_ = 1.00369025e-6;
  // The concn. of Ras-MKKKK* is set to 1 nM implicitly from Kholodenko, 2000
  species Ras_MKKKK_2007_0_ in kinetics_1962_0_ = 1.00369025e-6;
  // This is the inactive form of Ras-MKKK. Based on the reaction scheme from Kholodenko 2000, this is equivalent to a binding of the MAPK-PP to the Ras. The amount of Ras in the model is small enough that negligible amounts of MAPK are involved in this reaction. So it is a fair approximation to the negative feedback mechanism from Kholodenko, 2000.
  species inactiveRas_MKKK_2011_0_ in kinetics_1962_0_ = 0;
  // This is the double phosphorylated and active form of MKK from Kholodenko, 2000
  species MKK_PP_2015_0_ in kinetics_1962_0_ = 0;
  // This is the double phosphorylated and active form of MAPK. from Kholodenko, 2000.
  species MAPK_PP_2021_0_ in kinetics_1962_0_ = 0;

  // Reactions:
  // kinetics_1962_0_ * ( kcat * MKKK_P_1981_0_ * int1_1977_0_/(Km + MKKK_P_1981_0_))
  // Km is 8nM and Vmax is 0.25nM.s-1 from Kholodenko, 2000.
  _2_1979_0_: MKKK_P_1981_0_ -> MKKK_1973_0_; kinetics_1962_0_*(_2_1979_0__kcat*MKKK_P_1981_0_*int1_1977_0_/(_2_1979_0__Km + MKKK_P_1981_0_));  // modifiers: int1_1977_0_
    _2_1979_0__Km = 8e-6 mmole_per_litre; _2_1979_0__kcat = 0.25 per_second;
  // kinetics_1962_0_ * ( kcat * MKK_1975_0_ * MKKK_P_1981_0_/(Km + MKK_1975_0_))
  // Km is 15 nM and Vmax is 0.025s-1 from Kholodenko, 2000
  _3_1983_0_: MKK_1975_0_ -> MKK_P_1995_0_; kinetics_1962_0_*(_3_1983_0__kcat*MKK_1975_0_*MKKK_P_1981_0_/(_3_1983_0__Km + MKK_1975_0_));  // modifiers: MKKK_P_1981_0_
    _3_1983_0__Km = 1.500006e-5 mmole_per_litre; _3_1983_0__kcat = 0.025 per_second;
  // kinetics_1962_0_ * ( kcat * MKK_P_1995_0_ * MKKK_P_1981_0_/(Km + MKK_P_1995_0_))
  // Km is 15nM and Vmax is 0.025s-1 from Kholodenko, 2000.
  _4_1985_0_: MKK_P_1995_0_ -> MKK_PP_2015_0_; kinetics_1962_0_*(_4_1985_0__kcat*MKK_P_1995_0_*MKKK_P_1981_0_/(_4_1985_0__Km + MKK_P_1995_0_));  // modifiers: MKKK_P_1981_0_
    _4_1985_0__Km = 1.500006e-5 mmole_per_litre; _4_1985_0__kcat = 0.025 per_second;
  // kinetics_1962_0_ * ( kcat * MKK_P_1995_0_ * int3_1987_0_/(Km + MKK_P_1995_0_))
  // The Km is 15nM and the Vmax is 0.75nM.s-1 from Kholodenko 2000.
  _6_1989_0_: MKK_P_1995_0_ -> MKK_1975_0_; kinetics_1962_0_*(_6_1989_0__kcat*MKK_P_1995_0_*int3_1987_0_/(_6_1989_0__Km + MKK_P_1995_0_));  // modifiers: int3_1987_0_
    _6_1989_0__Km = 1.5e-5 mmole_per_litre; _6_1989_0__kcat = 0.75 per_second;
  // kinetics_1962_0_ * ( kcat * MAPK_P_1997_0_ * int5_1991_0_/(Km + MAPK_P_1997_0_))
  // The Km is 15nM and Vmax is 0.5nM.s-1 from Kholodenko, 2000
  _10_1993_0_: MAPK_P_1997_0_ -> MAPK_1971_0_; kinetics_1962_0_*(_10_1993_0__kcat*MAPK_P_1997_0_*int5_1991_0_/(_10_1993_0__Km + MAPK_P_1997_0_));  // modifiers: int5_1991_0_
    _10_1993_0__Km = 1.49997e-5 mmole_per_litre; _10_1993_0__kcat = 0.5 per_second;
  // kinetics_1962_0_ * ( kcat * MKK_PP_2015_0_ * int2_1999_0_/(Km + MKK_PP_2015_0_))
  // The Km is 15nM and Vmax is 0.75nM.s-1 from Kholodenko, 2000
  _5_2001_0_: MKK_PP_2015_0_ -> MKK_P_1995_0_; kinetics_1962_0_*(_5_2001_0__kcat*MKK_PP_2015_0_*int2_1999_0_/(_5_2001_0__Km + MKK_PP_2015_0_));  // modifiers: int2_1999_0_
    _5_2001_0__Km = 1.5e-5 mmole_per_litre; _5_2001_0__kcat = 0.75 per_second;
  // kinetics_1962_0_ * ( kcat * MAPK_PP_2021_0_ * int4_2003_0_/(Km + MAPK_PP_2021_0_))
  // The Km is 15nM and Vmax is 0.5nM.s-1 from Kholodenko, 2000
  _9_2005_0_: MAPK_PP_2021_0_ -> MAPK_P_1997_0_; kinetics_1962_0_*(_9_2005_0__kcat*MAPK_PP_2021_0_*int4_2003_0_/(_9_2005_0__Km + MAPK_PP_2021_0_));  // modifiers: int4_2003_0_
    _9_2005_0__Km = 1.49997e-5 mmole_per_litre; _9_2005_0__kcat = 0.5 per_second;
  // kinetics_1962_0_ * ( kcat * MKKK_1973_0_ * Ras_MKKKK_2007_0_/(Km + MKKK_1973_0_))
  // The Km is 10nM and Vmax is 2.5nM sec^-1. We assume that there is 1 nM of the Ras-MKKKK. From Kholodenko, 2000. If the enzymes are not flagged as Available, then this Km should be set to 0.1 to obtain oscillations.
  _1_2009_0_: MKKK_1973_0_ -> MKKK_P_1981_0_; kinetics_1962_0_*(_1_2009_0__kcat*MKKK_1973_0_*Ras_MKKKK_2007_0_/(_1_2009_0__Km + MKKK_1973_0_));  // modifiers: Ras_MKKKK_2007_0_
    _1_2009_0__Km = 1e-5 mmole_per_litre; _1_2009_0__kcat = 2.5 per_second;
  // kinetics_1962_0_ * ( kcat * MAPK_1971_0_ * MKK_PP_2015_0_/(Km + MAPK_1971_0_))
  // The Km is 15nM which is 0.015uM Vmax is 0.025s-1 from Kholodenko, 2000.
  _7_2017_0_: MAPK_1971_0_ -> MAPK_P_1997_0_; kinetics_1962_0_*(_7_2017_0__kcat*MAPK_1971_0_*MKK_PP_2015_0_/(_7_2017_0__Km + MAPK_1971_0_));  // modifiers: MKK_PP_2015_0_
    _7_2017_0__Km = 1.500006e-5 mmole_per_litre; _7_2017_0__kcat = 0.025 per_second;
  // kinetics_1962_0_ * ( kcat * MAPK_P_1997_0_ * MKK_PP_2015_0_/(Km + MAPK_P_1997_0_))
  // The Km is 15nM which is 0.015uM and Vmax is 0.025s-1 from Kholodenko, 2000
  _8_2019_0_: MAPK_P_1997_0_ -> MAPK_PP_2021_0_; kinetics_1962_0_*(_8_2019_0__kcat*MAPK_P_1997_0_*MKK_PP_2015_0_/(_8_2019_0__Km + MAPK_P_1997_0_));  // modifiers: MKK_PP_2015_0_
    _8_2019_0__Km = 1.500006e-5 mmole_per_litre; _8_2019_0__kcat = 0.025 per_second;

  // Unit definitions:
  unit volume = litre;
  unit substance = 1e-3 mole;
  unit length = metre;
  unit area = metre^2;
  unit time = second;
  unit mmole_per_litre = 1e-3 mole / litre;
  unit per_second = 1 / second;
end
