// SBML level 3 version 1

model reverse_bcm()
  // model units - substance: substance, time: time, volume: volume, area: area, length: length, extent: substance

  // Compartments:
  compartment kinetics_2723_0_ = 1.666667e-15 volume;

  // Species:
  species $Ca_2730_0_ in kinetics_2723_0_ = 8e-5;
  species CaN_2732_0_ in kinetics_2723_0_ = 0.0021;
  species Ca4_dot_CaMKII_2738_0_ in kinetics_2723_0_ = 0; Ca4_dot_CaMKII_2738_0_ is "Ca4.CaMKII";
  species Ca3_CaN_2742_0_ in kinetics_2723_0_ = 0;
  species CaMKII_2746_0_ in kinetics_2723_0_ = 0.00115;
  species B1_2748_0_ in kinetics_2723_0_ = 0.00152;
  species $B3_2756_0_ in kinetics_2723_0_ = 0.001;
  species aCaN_2758_0_ in kinetics_2723_0_ = 0;
  species blocked_AMPAR_2760_0_ in kinetics_2723_0_ = 0;
  species synAMPAR_2762_0_ in kinetics_2723_0_ = 0;

  // Reactions:
  // kinetics_2723_0_ * Ca_bind_CaN_2734_0__Kf * Ca_2730_0_^3*CaN_2732_0_-kinetics_2723_0_ * Ca_bind_CaN_2734_0__Kb * Ca3_CaN_2742_0_
  Ca_bind_CaN_2734_0_: 3 $Ca_2730_0_ + CaN_2732_0_ -> Ca3_CaN_2742_0_; kinetics_2723_0_*Ca_bind_CaN_2734_0__Kf*Ca_2730_0_^3*CaN_2732_0_ - kinetics_2723_0_*Ca_bind_CaN_2734_0__Kb*Ca3_CaN_2742_0_;
    Ca_bind_CaN_2734_0__Kf = 100000000000 litre_per_mmole_3_per_second; Ca_bind_CaN_2734_0__Kb = 0.175 per_second;
  // kinetics_2723_0_ * Ca_bind_CaM_2736_0__Kf * Ca_2730_0_^4*CaMKII_2746_0_-kinetics_2723_0_ * Ca_bind_CaM_2736_0__Kb * Ca4_dot_CaMKII_2738_0_
  Ca_bind_CaM_2736_0_: 4 $Ca_2730_0_ + CaMKII_2746_0_ -> Ca4_dot_CaMKII_2738_0_; kinetics_2723_0_*Ca_bind_CaM_2736_0__Kf*Ca_2730_0_^4*CaMKII_2746_0_ - kinetics_2723_0_*Ca_bind_CaM_2736_0__Kb*Ca4_dot_CaMKII_2738_0_;
    Ca_bind_CaM_2736_0__Kf = 1000000000000 litre_per_mmole_4_per_second; Ca_bind_CaM_2736_0__Kb = 10 per_second;
  // kinetics_2723_0_ * R1_2750_0__Kf * synAMPAR_2762_0_-kinetics_2723_0_ * R1_2750_0__Kb * B1_2748_0_
  R1_2750_0_: synAMPAR_2762_0_ -> B1_2748_0_; kinetics_2723_0_*R1_2750_0__Kf*synAMPAR_2762_0_ - kinetics_2723_0_*R1_2750_0__Kb*B1_2748_0_;
    R1_2750_0__Kf = 100 per_second; R1_2750_0__Kb = 35 per_second;
  // kinetics_2723_0_ * Activate_syn_AMPR_2752_0__Kf * synAMPAR_2762_0_*aCaN_2758_0_-kinetics_2723_0_ * Activate_syn_AMPR_2752_0__Kb * blocked_AMPAR_2760_0_
  Activate_syn_AMPR_2752_0_: synAMPAR_2762_0_ + aCaN_2758_0_ -> blocked_AMPAR_2760_0_; kinetics_2723_0_*Activate_syn_AMPR_2752_0__Kf*synAMPAR_2762_0_*aCaN_2758_0_ - kinetics_2723_0_*Activate_syn_AMPR_2752_0__Kb*blocked_AMPAR_2760_0_;
    Activate_syn_AMPR_2752_0__Kf = 1120 litre_per_mmole_per_second; Activate_syn_AMPR_2752_0__Kb = 1 per_second;
  // kinetics_2723_0_ * R2_2754_0__Kf * aCaN_2758_0_-kinetics_2723_0_ * R2_2754_0__Kb * B3_2756_0_
  R2_2754_0_: aCaN_2758_0_ -> $B3_2756_0_; kinetics_2723_0_*R2_2754_0__Kf*aCaN_2758_0_ - kinetics_2723_0_*R2_2754_0__Kb*B3_2756_0_;
    R2_2754_0__Kf = 100 per_second; R2_2754_0__Kb = 21.6 per_second;
  // kinetics_2723_0_ * ( kcat * B1_2748_0_ * Ca4_dot_CaMKII_2738_0_ / ( Km + B1_2748_0_))
  kenz_2740_0_: B1_2748_0_ -> synAMPAR_2762_0_; kinetics_2723_0_*(kenz_2740_0__kcat*B1_2748_0_*Ca4_dot_CaMKII_2738_0_/(kenz_2740_0__Km + B1_2748_0_));  // modifiers: Ca4_dot_CaMKII_2738_0_
    kenz_2740_0__Km = 0.0001 mmole_per_litre; kenz_2740_0__kcat = 100 per_second;
  // kinetics_2723_0_ * ( kcat * B3_2756_0_ * Ca3_CaN_2742_0_ / ( Km + B3_2756_0_))
  kenz_2744_0_: $B3_2756_0_ -> aCaN_2758_0_; kinetics_2723_0_*(kenz_2744_0__kcat*B3_2756_0_*Ca3_CaN_2742_0_/(kenz_2744_0__Km + B3_2756_0_));  // modifiers: Ca3_CaN_2742_0_
    kenz_2744_0__Km = 0.01 mmole_per_litre; kenz_2744_0__kcat = 1000 per_second;

  // Unit definitions:
  unit volume = litre;
  unit substance = 1e-3 mole;
  unit length = metre;
  unit area = metre^2;
  unit time = second;
  unit litre_per_mmole_3_per_second = litre^3 / ((1e-3 mole)^3 * second);
  unit per_second = 1 / second;
  unit litre_per_mmole_4_per_second = litre^4 / ((1e-3 mole)^4 * second);
  unit litre_per_mmole_per_second = litre / (1e-3 mole * second);
  unit mmole_per_litre = 1e-3 mole / litre;
end
